# OpenSim document version 40000
AnalyzeTool Mingce_ToeWalk01:
  model_file: H:\BIOM9541 2025\ToeWalk\subject01_simbody_adjusted.osim
  replace_force_set: false
  force_set_files: gait2392_CMC_Actuators_Matt.xml
  results_directory: ResultsAnalyze
  output_precision: 8
  initial_time: 0.92
  final_time: 2.3
  solve_for_equilibrium_for_auxiliary_states: false
  maximum_number_of_integrator_steps: 20000
  maximum_integrator_step_size: 1
  minimum_integrator_step_size: 1e-8
  integrator_error_tolerance: 1e-5
  external_loads_file: ToeWalk01_GRFs.xml
  states_file: ResultsCMC/Mingce_ToeWalk01_states.sto
  lowpass_cutoff_frequency_for_coordinates: -1
  AnalysisSet Analyses:
    Kinematics: coordinates=all start_time=0.92 end_time=2.3 step_interval=10 in_degrees=true
    Actuation: start_time=0.92 end_time=2.3 step_interval=10 in_degrees=true
    BodyKinematics: start_time=0.92 end_time=2.3 step_interval=10 in_degrees=true bodies=all
        express_results_in_body_local_frame=false
    MuscleAnalysis: start_time=0.92 end_time=2.3 step_interval=1 in_degrees=true muscle_list=all
        moment_arm_coordinate_list=all compute_moments=false
    JointReaction: start_time=0.92 end_time=2.3 step_interval=1 in_degrees=true
        forces_file=(H:\BIOM9541 2025\ToeWalk\ResultsCMC\Mingce_ToeWalk01_Actuation_force.sto) joint_names=ALL
        apply_on_bodies=child express_in_frame=ground
  ControllerSet Controllers:
    ControlSetController: controls_file=ResultsCMC/Mingce_ToeWalk01_controls.xml
