# OpenSim document version 40500
InverseKinematicsTool:
  time_range: 0 6.685
  marker_file: Hanif_Deep_2_5.trc
  IKTaskSet:
    IKMarkerTask RASI: apply=true weight=1
    IKMarkerTask LASI: apply=true weight=1
    IKMarkerTask RTHI: apply=true weight=0.1
    IKMarkerTask RKNE: apply=true weight=1
    IKMarkerTask RTIB: apply=true weight=0.1
    IKMarkerTask RANK: apply=true weight=1
    IKMarkerTask RHEE: apply=true weight=1
    IKMarkerTask RTOE: apply=true weight=1
    IKMarkerTask LTHI: apply=true weight=0.1
    IKMarkerTask LKNE: apply=true weight=1
    IKMarkerTask LTIB: apply=true weight=0.1
    IKMarkerTask LANK: apply=true weight=1
    IKMarkerTask LHEE: apply=true weight=1
    IKMarkerTask LTOE: apply=true weight=1
    IKMarkerTask RPSI: apply=true weight=1
    IKMarkerTask LPSI: apply=true weight=1
    IKMarkerTask C7: apply=true weight=1
    IKMarkerTask CLAV: apply=true weight=1
    IKMarkerTask RBAK: apply=true weight=1
