# OpenSim document version 40500
ScaleTool Hanif-Scaled:
  mass: 56.85 [kg]
  height: -1
  age: -1
  ModelScaler:
    apply: true
    scaling_order: measurements manualScale
    marker_file: Stat_Cal.trc
    time_range: 0 0.525
    preserve_mass_distribution: true
    MeasurementSet:
      Measurement trunk: apply=true
        MarkerPair: markers=(RASI C7)
        MarkerPair: markers=(LASI C7)
        BodyScale torso: axes=(X Y Z)
      Measurement pelvis: apply=true
        MarkerPair: markers=(RASI LASI)
        MarkerPair: markers=(RPSI LPSI)
        BodyScale pelvis: axes=(X Y Z)
      Measurement thigh: apply=true
        MarkerPair: markers=(RASI RKNE)
        MarkerPair: markers=(LASI LKNE)
        BodyScale femur_r: axes=(X Y Z)
        BodyScale femur_l: axes=(X Y Z)
      Measurement shank: apply=true
        MarkerPair: markers=(RKNE RANK)
        MarkerPair: markers=(LKNE LANK)
        BodyScale tibia_r: axes=(X Y Z)
        BodyScale tibia_l: axes=(X Y Z)
      Measurement foot: apply=true
        MarkerPair: markers=(RHEE RTOE)
        MarkerPair: markers=(LHEE LTOE)
        BodyScale talus_r: axes=(X Y Z)
        BodyScale calcn_r: axes=(X Y Z)
        BodyScale toes_r: axes=(X Y Z)
        BodyScale talus_l: axes=(X Y Z)
        BodyScale calcn_l: axes=(X Y Z)
        BodyScale toes_l: axes=(X Y Z)
    ScaleSet:
      Scale: scales=(2 2 2) segment=toes_l apply=false
  MarkerPlacer:
    apply: true
    marker_file: Stat_Cal.trc
    time_range: 0 0.525
    max_marker_movement: -1
    IKTaskSet:
      IKMarkerTask RASI: apply=true weight=1
      IKMarkerTask LASI: apply=true weight=1
      IKMarkerTask RTHI: apply=false weight=1
      IKMarkerTask RKNE: apply=true weight=1
      IKMarkerTask RTIB: apply=false weight=1
      IKMarkerTask RANK: apply=true weight=1
      IKMarkerTask RHEE: apply=true weight=1
      IKMarkerTask RTOE: apply=true weight=1
      IKMarkerTask LTHI: apply=false weight=1
      IKMarkerTask LKNE: apply=true weight=1
      IKMarkerTask LTIB: apply=false weight=1
      IKMarkerTask LANK: apply=true weight=1
      IKMarkerTask LHEE: apply=true weight=1
      IKMarkerTask LTOE: apply=true weight=1
      IKMarkerTask RPSI: apply=true weight=1
      IKMarkerTask LPSI: apply=true weight=1
      IKMarkerTask C7: apply=true weight=1
      IKMarkerTask CLAV: apply=true weight=1
      IKMarkerTask RBAK: apply=false weight=1
      IKCoordinateTask [values shared by the 6 below unless stated]: apply=false value_type=default_value value=0
      IKCoordinateTask pelvis_tilt: weight=10
      IKCoordinateTask pelvis_list: weight=10
      IKCoordinateTask subtalar_angle_r: weight=1000
      IKCoordinateTask mtp_angle_r: weight=1000
      IKCoordinateTask subtalar_angle_l: weight=1000
      IKCoordinateTask mtp_angle_l: weight=1000
