# OpenSim document version 40000
ScaleTool 3DGaitModel2354-scaled:
  mass: 98 [kg]
  height: -1
  age: -1
  ModelScaler:
    apply: true
    scaling_order: measurements
    marker_file: MingceV2 Cal 01.trc
    time_range: 0.75 1.25
    preserve_mass_distribution: true
    MeasurementSet:
      Measurement hips: apply=true
        MarkerPair: markers=(LASI RPSI)
        MarkerPair: markers=(LPSI RASI)
        BodyScale pelvis: axes=(X Y Z)
      Measurement trunk: apply=true
        MarkerPair: markers=(RASI C7)
        MarkerPair: markers=(LASI C7)
        BodyScale torso: axes=(X Y Z)
      Measurement thigh: apply=true
        MarkerPair: markers=(RASI RKNE)
        MarkerPair: markers=(LASI LKNE)
        BodyScale femur_r: axes=(X Y Z)
        BodyScale femur_l: axes=(X Y Z)
      Measurement shank: apply=true
        MarkerPair: markers=(RKNE RANK)
        MarkerPair: markers=(LKNE LANK)
        BodyScale tibia_r: axes=(X Y Z)
        BodyScale tibia_l: axes=(X Y Z)
      Measurement foot: apply=true
        MarkerPair: markers=(LHEE LTOE)
        MarkerPair: markers=(RHEE RTOE)
        BodyScale talus_r: axes=(X Y Z)
        BodyScale calcn_r: axes=(X Y Z)
        BodyScale toes_r: axes=(X Y Z)
        BodyScale talus_l: axes=(X Y Z)
        BodyScale calcn_l: axes=(X Y Z)
        BodyScale toes_l: axes=(X Y Z)
  MarkerPlacer:
    apply: true
    marker_file: MingceV2 Cal 01.trc
    time_range: 0.75 1.25
    max_marker_movement: -1
    IKTaskSet:
      IKMarkerTask RASI: apply=true weight=1
      IKMarkerTask LASI: apply=true weight=1
      IKMarkerTask RTHI: apply=false weight=1
      IKMarkerTask RKNE: apply=true weight=1
      IKMarkerTask RTIB: apply=false weight=1
      IKMarkerTask RANK: apply=true weight=1
      IKMarkerTask RHEE: apply=true weight=1
      IKMarkerTask RTOE: apply=true weight=1
      IKMarkerTask LTHI: apply=false weight=1
      IKMarkerTask LKNE: apply=true weight=1
      IKMarkerTask LTIB: apply=false weight=1
      IKMarkerTask LANK: apply=true weight=1
      IKMarkerTask LHEE: apply=true weight=1
      IKMarkerTask LTOE: apply=true weight=1
      IKMarkerTask RPSI: apply=true weight=1
      IKMarkerTask LPSI: apply=true weight=1
      IKMarkerTask C7: apply=true weight=1
      IKMarkerTask CLAV: apply=true weight=1
      IKMarkerTask RBAK: apply=false weight=1
      IKCoordinateTask [values shared by the 5 below unless stated]: apply=true weight=5 value_type=default_value
          value=0
      IKCoordinateTask pelvis_list
      IKCoordinateTask subtalar_angle_r
      IKCoordinateTask mtp_angle_r
      IKCoordinateTask subtalar_angle_l
      IKCoordinateTask mtp_angle_l
